#
variable        NAME index mol
log             ${NAME}.log
variable        infile index data.benzene
variable        mytemp index 300

# set up simulation
#read_restart    ${NAME}.restart.*

# the following information is saved to restart files
units           real
atom_style      full
boundary        f f f
pair_style      lj/cut/coul/cut 12
#kspace_style    pppm 0.0001
pair_modify     tail no
pair_modify     mix arithmetic
special_bonds   lj 0.0 0.0 0.0 coul 0.0 0.0 0.0

bond_style      harmonic
angle_style     harmonic
dihedral_style  charmm
improper_style  cvff

#read_data       ${infile}
read_data       data.benzene

#replicate       5 5 5

neighbor        2.0 bin
neigh_modify    delay 0 every 1 check yes page 1000000 one 20000
timestep        1.0
#velocity        all create ${mytemp} 314159265 mom yes rot yes dist gaussian

## end information that is saved to restart files

## create velocity profile
#minimize       1e-4 1e-6 10000 10000
velocity        all create  ${mytemp} 314159265 units box
velocity        all zero linear units box
dump            DUMP all custom 2000 ${NAME}.lammpstrj id type x y z vx vy vz mol
thermo_style    custom step etotal ebond eangle edihed evdwl etail ke
thermo          1000
#
## thermostat and integrator

#fix             NPT all npt temp ${mytemp} ${mytemp} 100.0 iso 1.0 1.0 100.0
fix             NVT all nvt temp ${mytemp} ${mytemp} 100.0

restart         50000 restart.${NAME}.1 restart.${NAME}.2
run             0


write_restart   restart.${NAME}
